<?xml version="1.0"?>
<?xml-stylesheet href="http://jsbsim.sourceforge.net/JSBSim.xsl" type="text/xsl"?>
<fdm_config name="P38L" version="2.0" release="BETA"
 xmlns:xsi="http://www.w3.org/2001/XMLSchema-instance"
 xsi:noNamespaceSchemaLocation="http://jsbsim.sourceforge.net/JSBSim.xsd">

    <fileheader>
        <author>  Aeromatic mod  g.robin</author>
        <filecreationdate> 2007-06-26 </filecreationdate>
        <version> Version 0.1</version>
        <description> Models a P-38L </description>
        <documentation>


General characteristics
Crew: One
Length: 37 ft 10 in (11.53 m)
Wingspan: 52 ft 0 in (15.85 m)
Height: 9 ft 10 in (3.00 m)
Wing area: 327.5 ft² (30.43 m²)
Airfoil: NACA 23016 / NACA 4412
Empty weight: 12,780 lb (5,800 kg)
Loaded weight: 17,500 lb (7,940 kg)
Max takeoff weight: 21,600 lb (9,798 kg)
Powerplant: 2× Allison V-1710-111/113 liquid-cooled turbosupercharged V-12, 1,600 hp (1,194 kW) each
Zero-lift drag coefficient: 0.0268
Drag area: 8.78 ft² (0.82 m²)
Aspect ratio: 8.26
Performance
Maximum speed: 414 mph at 25,000 ft (667 km/h at 7,620 m) (360 kt)
Stall speed: 105 mph (170 km/h) (91.24 kt)
Range: 1,100 mi combat, 2,600 mi ferry (1,770 km / 3,640 km)
Service ceiling: 44,000 ft (13,400 m)
Rate of climb: maximum: 4,750 ft/min (1,448 m/min)
Wing loading: 53.4 lb/ft² (260.9 kg/m²)
Power/mass: 0.16 hp/lb (0.27 kW/kg)
Lift-to-drag ratio: 13.5
Armament
1x Hispano M2(C) 20 mm cannon with 150 rounds (2 AP, 2 tracer and 2 HE ammo belt composition) and 4x Colt-Browning MG53-2 0.50 in (12.7 mm) machine guns with 500 rounds per gun. The rate of fire was about 650 rounds per minute for the 20x110 mm cannon round (130 g shell) at a muzzle velocity of about 880 m/s, and for the 12.7x99 mm MGs (43-48 g), about 850 rpm at 840 m/s velocity.
4x M10 three-tube 4.5 in (112 mm) rocket launchers or:
10x 5 in (127 mm) HVAR's (High Velocity Aircraft Rocket) and/or:
either 2x 2,000 lb (908 kg) or 2x 1,000 lb (454 kg), 4x 500 lb (227 kg) or 4x 250 lb (114 kg) bombs


  File:     P38L.xml
  Author:   Aero-Matic v 0.71

  Inputs:
    name:          P38L
    type:          two-engine transonic/supersonic fighter
    max weight:    20300 lb
    wing span:     52 ft
    length:        37.10 ft
    wing area:     328 sq-ft
    gear type:     tricycle
    retractable?:  yes
    # engines:     2
    engine type:   piston
    engine layout: wings
    yaw damper?    no

  Outputs:
    wing loading:  61.89 lb/sq-ft
    CL-alpha:      3.6 per radian
    CL-0:          0.08
    CL-max:        1
    CD-0:          0.024
    K:             0.09


        </documentation>
    </fileheader>


    <metrics>
        <wingarea unit="FT2"> 327.50 </wingarea>
        <wingspan unit="FT"> 52 </wingspan>
        <wing_incidence>          2.00 </wing_incidence> <!--aeromatic 2 -->
        <chord unit="FT"> 9.30 </chord> <!--estimated with drawing-->
        <htailarea unit="FT2"> 80 </htailarea><!--estimated with drawing-->
        <htailarm unit="FT"> 21 </htailarm><!--estimated with drawing-->
        <vtailarea unit="FT2"> 50 </vtailarea> <!--estimated with drawing-->
        <vtailarm unit="FT"> 20 </vtailarm><!--estimated with drawing-->
        <location name="AERORP" unit="IN">
            <x> 0 </x>
            <y> 0 </y>
            <z> 15 </z>
        </location>
        <location name="EYEPOINT" unit="IN">
            <x> 110.7 </x>
            <y> 0 </y>
            <z> 40 </z>
        </location>
        <location name="VRP" unit="IN">
            <x> 0 </x>
            <y> 0 </y>
            <z> 0 </z>
        </location>
    </metrics>

    <mass_balance>
        <ixx unit="SLUG*FT2">     22882 </ixx>
        <iyy unit="SLUG*FT2">     16010 </iyy>
        <izz unit="SLUG*FT2">     33570 </izz>
        <ixy unit="SLUG*FT2">         0 </ixy>
        <ixz unit="SLUG*FT2">         0 </ixz>
        <iyz unit="SLUG*FT2">         0 </iyz>
        <emptywt unit="LBS" >     12960 </emptywt>
        <location name="CG" unit="IN">
            <x>  -2.5299213 </x>
            <y> 0 </y>
            <z> -8.193189 </z>
        </location>
    </mass_balance>

    <ground_reactions>
        <contact type="BOGEY" name="NOSE_LG">
            <location unit="IN">
                <x> -107.15551 </x>
                <y> 0 </y>
                <z> -88.062205 </z>
            </location>
            <static_friction> 0.8 </static_friction>
            <dynamic_friction> 0.5 </dynamic_friction>
            <rolling_friction> 0.02 </rolling_friction>
            <spring_coeff unit="LBS/FT"> 10800 </spring_coeff><!--aeromatic 6480-->
            <damping_coeff unit="LBS/FT/SEC"> 3600 </damping_coeff><!--aeromatic 2160-->
            <max_steer unit="DEG"> 10 </max_steer>
            <brake_group> NOSE </brake_group>
            <retractable>1</retractable>
        </contact>
        <contact type="BOGEY" name="LEFT_MLG">
            <location unit="IN">
                <x> 14.929094 </x>
                <y> -98.159843 </y>
                <z> -77.284646 </z>
            </location>
            <static_friction> 0.8 </static_friction>
            <dynamic_friction> 0.5 </dynamic_friction>
            <rolling_friction> 0.02 </rolling_friction>
            <spring_coeff unit="LBS/FT"> 21600 </spring_coeff>
            <damping_coeff unit="LBS/FT/SEC"> 4320 </damping_coeff>
            <max_steer unit="DEG"> 0.0 </max_steer>
            <brake_group> LEFT </brake_group>
            <retractable>1</retractable>
        </contact>
        <contact type="BOGEY" name="RIGHT_MLG">
            <location unit="IN">
                <x> 14.929094 </x>
                <y> 98.159843 </y>
                <z> -77.284646 </z>
            </location>
            <static_friction> 0.8 </static_friction>
            <dynamic_friction> 0.5 </dynamic_friction>
            <rolling_friction> 0.02 </rolling_friction>
            <spring_coeff unit="LBS/FT"> 21600 </spring_coeff>
            <damping_coeff unit="LBS/FT/SEC"> 4320 </damping_coeff>
            <max_steer unit="DEG"> 0.0 </max_steer>
            <brake_group> RIGHT </brake_group>
            <retractable>1</retractable>
        </contact>
        <contact type="BOGEY" name="WT_LEFT">
            <location unit="IN">
                <x> 0 </x>
                <y> -316.9 </y>
                <z> 32.952835</z>
            </location>
            <static_friction> 0.2 </static_friction>
            <dynamic_friction> 0.2 </dynamic_friction>
            <rolling_friction> 2 </rolling_friction>
            <spring_coeff unit="LBS/FT"> 20000 </spring_coeff>
            <damping_coeff unit="LBS/FT/SEC"> 6000 </damping_coeff>
            <max_steer unit="DEG"> 0.0 </max_steer>
            <brake_group> NONE </brake_group>
            <retractable>0</retractable>
        </contact>
        <contact type="BOGEY" name="WT_RIGHT">
            <location unit="IN">
                <x> 0 </x>
                <y> 316.9 </y>
                <z> 32.952835</z>
            </location>
            <static_friction> 0.2 </static_friction>
            <dynamic_friction> 0.2 </dynamic_friction>
            <rolling_friction> 2 </rolling_friction>
            <spring_coeff unit="LBS/FT"> 20000 </spring_coeff>
            <damping_coeff unit="LBS/FT/SEC"> 6000 </damping_coeff>
            <max_steer unit="DEG"> 0.0 </max_steer>
            <brake_group> NONE </brake_group>
            <retractable>0</retractable>
        </contact>
        <!--<contact type="BOGEY" name="VT_LEFTUP">
            <location unit="IN">
                <x> 392.5 </x>
                <y> -98.42 </y>
                <z> 70.1 </z>
            </location>
            <static_friction> 0.2 </static_friction>
            <dynamic_friction> 0.2 </dynamic_friction>
            <rolling_friction> 2 </rolling_friction>
            <spring_coeff unit="LBS/FT"> 10000 </spring_coeff>
            <damping_coeff unit="LBS/FT/SEC"> 20000 </damping_coeff>
            <max_steer unit="DEG"> 0.0 </max_steer>
            <brake_group> NONE </brake_group>
            <retractable>0</retractable>
        </contact>
        <contact type="BOGEY" name="VT_RIGHTUP">
            <location unit="IN">
                <x> 392.5 </x>
                <y> 98.42 </y>
                <z> 70.1 </z>
            </location>
            <static_friction> 0.2 </static_friction>
            <dynamic_friction> 0.2 </dynamic_friction>
            <rolling_friction> 2 </rolling_friction>
            <spring_coeff unit="LBS/FT"> 10000 </spring_coeff>
            <damping_coeff unit="LBS/FT/SEC"> 20000 </damping_coeff>
            <max_steer unit="DEG"> 0.0 </max_steer>
            <brake_group> NONE </brake_group>
            <retractable>0</retractable>
        </contact>-->
        <contact type="BOGEY" name="VT_LEFTDOWN">
            <location unit="IN">
                <x> 267.30669</x>
                <y> -98.42 </y>
                <z> -16.952402</z>
            </location>
            <static_friction> 0.2 </static_friction>
            <dynamic_friction> 0.2 </dynamic_friction>
            <rolling_friction> 2 </rolling_friction>
            <spring_coeff unit="LBS/FT"> 10000</spring_coeff>
            <damping_coeff unit="LBS/FT/SEC"> 3000 </damping_coeff>
            <max_steer unit="DEG"> 0.0 </max_steer>
            <brake_group> NONE </brake_group>
            <retractable>0</retractable>
        </contact>
        <contact type="BOGEY" name="VT_RIGHTDOWN">
            <location unit="IN">
                <x> 267.30669</x>
                <y> 98.42 </y>
                <z> -16.952402</z>
            </location>
            <static_friction> 0.2 </static_friction>
            <dynamic_friction> 0.2 </dynamic_friction>
            <rolling_friction> 2 </rolling_friction>
            <spring_coeff unit="LBS/FT"> 10000 </spring_coeff>
            <damping_coeff unit="LBS/FT/SEC"> 3000 </damping_coeff>
            <max_steer unit="DEG"> 0.0 </max_steer>
            <brake_group> NONE </brake_group>
            <retractable>0</retractable>
        </contact>
        <contact type="BOGEY" name="BELLYLEFT">
            <location unit="IN">
                <x> -33.554331</x>
                <y> -102.32283</y>
                <z> -32.694488</z>
            </location>
            <static_friction> 0.2 </static_friction>
            <dynamic_friction> 0.2 </dynamic_friction>
            <rolling_friction> 2 </rolling_friction>
            <spring_coeff unit="LBS/FT"> 30000 </spring_coeff>
            <damping_coeff unit="LBS/FT/SEC"> 10000 </damping_coeff>
            <max_steer unit="DEG"> 0.0 </max_steer>
            <brake_group> NONE </brake_group>
            <retractable>0</retractable>
        </contact>
        <contact type="BOGEY" name="BELLYRIGHT">
            <location unit="IN">
                <x> -33.554331</x>
                <y> 102.32283</y>
                <z> -32.694488</z>
            </location>
            <static_friction> 0.2 </static_friction>
            <dynamic_friction> 0.2 </dynamic_friction>
            <rolling_friction> 2 </rolling_friction>
            <spring_coeff unit="LBS/FT"> 30000 </spring_coeff>
            <damping_coeff unit="LBS/FT/SEC"> 10000 </damping_coeff>
            <max_steer unit="DEG"> 0.0 </max_steer>
            <brake_group> NONE </brake_group>
            <retractable>0</retractable>
        </contact>
    </ground_reactions>
    <propulsion>
        <engine file="Allison">
            <location unit="IN">
                <x> -70</x>
                <y> -96.46811</y>
                <z> -0.095036614</z>
            </location>
            <orient unit="DEG">
                <roll> 0.0 </roll>
                <pitch> 0 </pitch>
                <yaw> 0 </yaw>
            </orient>
            <feed>0</feed>
            <feed>1</feed>
            <feed>2</feed>
            <thruster file="P-38L_prop">
                <location unit="IN">
                    <x> -99.650394</x>
                    <y> -96.46811</y>
                    <z> -0.095036614</z>
                </location>
                <orient unit="DEG">
                    <roll> 0.0 </roll>
                    <pitch> 0.0 </pitch>
                    <yaw> 0.0 </yaw>
                </orient>
                 <sense> -1 </sense>
                <p_factor> 60</p_factor>
            </thruster>
        </engine>

        <engine file="Allison">
            <location unit="IN">
                <x> -70</x>
                <y> 96.46811</y>
                <z> -0.095036614</z>
            </location>
            <orient unit="DEG">
                <roll> 0.0 </roll>
                <pitch> 0 </pitch>
                <yaw> 0 </yaw>
            </orient>
            <feed>0</feed>
            <feed>1</feed>
            <feed>2</feed>
            <thruster file="P-38L_prop">
                <location unit="IN">
                    <x> -99.650394</x>
                    <y> 96.46811</y>
                    <z> -0.095036614</z>
                </location>
                <orient unit="DEG">
                    <roll> 0.0 </roll>
                    <pitch> 0.0 </pitch>
                    <yaw> 0.0 </yaw>
                </orient>
                 <sense> 1 </sense>
                <p_factor> 60</p_factor>
            </thruster>
        </engine>

        <tank type="FUEL">    <!-- Tank number 0   main + reserve 424 gal_us -->
            <location unit="IN">
                <x> 0 </x>
                <y> 0 </y>
                <z> -20 </z>
            </location>
            <capacity unit="LBS"> 2800 </capacity>
            <contents unit="LBS"> 1000 </contents>
        </tank>
        <tank type="FUEL">    <!-- Tank number 1   aux 300 gal_us-->
            <location unit="IN">
                <x> 0 </x>
                <y> 0 </y>
                <z> -20 </z>
            </location>
            <capacity unit="LBS"> 1980 </capacity>
            <contents unit="LBS"> 1000 </contents>
        </tank>
        <tank type="FUEL">    <!-- Tank number 2  aux 300 gal_us-->
            <location unit="IN">
                <x> 0 </x>
                <y> 0 </y>
                <z> -20 </z>
            </location>
            <capacity unit="LBS"> 1980 </capacity>
            <contents unit="LBS"> 1000 </contents>
        </tank>
    </propulsion>
    <flight_control name="FCS: P38L">

        <!--<property>fcs/canopy-cmd-norm</property>
        <property>fcs/canopy-pos-norm</property>-->
        <property>/controls/flight/cowl-flap</property>
        <property>/surface-positions/cowl-flap-pos-norm</property>
        <property>fcs/canopy-control</property>
        <property>/consumables/fuel/total-fuel-gal</property>


     <channel name="All">

        <summer name="Pitch Trim Sum">
            <input>fcs/elevator-cmd-norm</input>
            <input>fcs/pitch-trim-cmd-norm</input>
            <clipto>
                <min>-1</min>
                <max>1</max>
            </clipto>
            <output>fcs/elevator-pos-norm</output>
        </summer>

        <aerosurface_scale name="Elevator Control">
            <input>fcs/pitch-trim-sum</input>
            <range>
                <min>-0.35</min>
                <max>0.3</max>
            </range>
            <output>fcs/elevator-pos-rad</output>
        </aerosurface_scale>

        <summer name="Roll Trim Sum">
            <input>fcs/aileron-cmd-norm</input>
            <input>fcs/roll-trim-cmd-norm</input>
            <clipto>
                <min>-1</min>
                <max>1</max>
            </clipto>
        </summer>

        <aerosurface_scale name="Left Aileron Control">
            <input>fcs/roll-trim-sum</input>
            <range>
                <min>-0.35</min>
                <max>0.35</max>
            </range>
            <output>fcs/left-aileron-pos-rad</output>
        </aerosurface_scale>

        <aerosurface_scale name="Right Aileron Control">
            <input>-fcs/roll-trim-sum</input>
            <range>
                <min>-0.35</min>
                <max>0.35</max>
            </range>
            <output>fcs/right-aileron-pos-rad</output>
        </aerosurface_scale>

        <summer name="Rudder Command Sum">
            <input>fcs/rudder-cmd-norm</input>
            <input>fcs/yaw-trim-cmd-norm</input>
            <clipto>
                <min>-1</min>
                <max>1</max>
            </clipto>
        </summer>

        <aerosurface_scale name="Rudder Control">
            <input>fcs/rudder-command-sum</input>
            <range>
                <min>-0.35</min>
                <max>0.35</max>
            </range>
            <output>fcs/rudder-pos-rad</output>
        </aerosurface_scale>

        <kinematic name="Flaps Control">
            <input>fcs/flap-cmd-norm</input>
            <traverse>
                <setting>
                    <position>0</position>
                    <time>0</time>
                </setting>
                <setting>
                    <position>7</position>
                    <time>2</time>
                </setting>
                <setting>
                    <position>14</position>
                    <time>2</time>
                </setting>
                <setting>
                    <position>21</position>
                    <time>2</time>
                </setting>
                <setting>
                    <position>28</position>
                    <time>2</time>
                </setting>
            </traverse>
            <output>fcs/flap-pos-deg</output>
        </kinematic>

        <aerosurface_scale name="Flap Position Normalizer">
                <input>fcs/flaps-control</input>
                <domain>
                        <min>0</min>
                        <max>30</max>
                </domain>
                <range>
                        <min>0</min>
                        <max>1</max>
                </range>
                <output>fcs/flap-pos-norm</output>
        </aerosurface_scale>

        <kinematic name="Gear Control">
            <input>gear/gear-cmd-norm</input>
            <traverse>
                <setting>
                    <position>0</position>
                    <time>0</time>
                </setting>
                <setting>
                    <position>1</position>
                    <time>5</time>
                </setting>
            </traverse>
            <output>gear/gear-pos-norm</output>
        </kinematic>

        <kinematic name="Speedbrake Control">
            <input>fcs/speedbrake-cmd-norm</input>
            <traverse>
                <setting>
                    <position>0</position>
                    <time>0</time>
                </setting>
                <setting>
                    <position>1</position>
                    <time>1</time>
                </setting>
            </traverse>
            <output>fcs/speedbrake-pos-norm</output>
        </kinematic>

        <summer name="Throttle0">
            <input>/controls/engines/engine[0]/throttle</input>
            <clipto>
                <min>0.2</min>
                <max>1.0</max>
            </clipto>
            <output>fcs/throttle-cmd-norm</output>
        </summer>

        <summer name="Throttle1">
            <input>/controls/engines/engine[1]/throttle</input>
            <clipto>
                <min>0.2</min>
                <max>1.0</max>
            </clipto>
            <output>fcs/throttle-cmd-norm[1]</output>
        </summer>

        <summer name="Tank Capacity">
            <input>/consumables/fuel/tank[0]level-gal_us</input>
            <input>/consumables/fuel/tank[1]level-gal_us</input>
            <input>/consumables/fuel/tank[2]level-gal_us</input>
            <clipto>
                <min>0</min>
                <max>1024</max>
            </clipto>
            <output>/consumables/fuel/total-fuel-gal</output>
        </summer>


        <switch name="Canopy Cmd Norm">
                <default value="0"/>
                <test  logic="AND" value="1">
                    /controls/gear/brake-parking == 1
                    fcs/canopy-control == 1
                </test>
        </switch>


        <kinematic name="Canopy">
            <input>fcs/canopy-cmd-norm</input>
            <traverse>
                <setting>
                    <position>0</position>
                    <time>0</time>
                </setting>
                <setting>
                    <position>1</position>
                    <time>5</time>
                </setting>
            </traverse>
            <output>fcs/canopy-pos-norm</output>
        </kinematic>


        <kinematic name="Cowl Flap Control">
            <input>/controls/flight/cowl-flap</input>
            <traverse>
                    <setting>
                            <position>0</position>
                            <time>0</time>
                    </setting>
                    <setting>
                            <position>1</position>
                            <time>2</time>
                    </setting>
            </traverse>
            <output>/surface-positions/cowl-flap-pos-norm</output>
        </kinematic>


     </channel>

    </flight_control>
    <aerodynamics>

        <function name="aero/function/kCLge">
            <description>Change_in_lift_due_to_ground_effect</description>
            <product>
                  <table>
                      <independentVar>aero/h_b-mac-ft</independentVar>
                      <tableData>
                          0.0000  1.2290
                          0.1000  1.1240
                          0.1500  1.1160
                          0.2000  1.1240
                          0.3000  1.1050
                          0.4000  1.0410
                          0.5000  1.0340
                          0.6000  1.0190
                          0.7000  1.0080
                          0.8000  1.0030
                          0.9000  1.0010
                          1.0000  1.0000
                          1.1000  1.0000
                      </tableData>
                  </table>
            </product>
        </function>

        <axis name="DRAG">
            <function name="aero/coefficient/CD0">
                <description>Drag_at_zero_lift</description>
                <product>
                    <property>aero/qbar-psf</property>
                    <property>metrics/Sw-sqft</property>
                      <table>
                          <independentVar>aero/alpha-rad</independentVar>
                          <tableData>
                              -1.5700	1.5000
                              -0.2600	0.0400
                              0.0000	0.0268
                              0.2600	0.0400
                              1.5700	1.5000
                          </tableData>
                      </table>
                </product>
            </function>
            <function name="aero/coefficient/CDi">
                <description>Induced_drag</description>
                <product>
                    <property>aero/qbar-psf</property>
                    <property>metrics/Sw-sqft</property>
                    <property>aero/cl-squared</property>
                    <value>0.0900</value>
                </product>
            </function>
            <function name="aero/coefficient/CDmach">
                <description>Drag_due_to_mach</description>
                <product>
                    <property>aero/qbar-psf</property>
                    <property>metrics/Sw-sqft</property>
                      <table>
                          <independentVar>velocities/mach</independentVar>
                          <tableData>
                              0.0000	0.0000
                              0.8100	0.0000
                              1.1000	0.0230
                              1.8000	0.0150
                          </tableData>
                      </table>
                </product>
            </function>
            <function name="aero/coefficient/CDflap">
                <description>Drag_due_to_flaps</description>
                <product>
                    <property>aero/qbar-psf</property>
                    <property>metrics/Sw-sqft</property>
                    <property>fcs/flap-pos-norm</property>
                    <value>0.0750</value>
                </product>
            </function>
            <function name="aero/coefficient/CDgear">
                <description>Drag_due_to_gear</description>
                <product>
                    <property>aero/qbar-psf</property>
                    <property>metrics/Sw-sqft</property>
                    <property>gear/gear-pos-norm</property>
                    <value>0.0200</value>
                </product>
            </function>
            <function name="aero/coefficient/CDsb">
                <description>Drag_due_to_speedbrakes</description>
                <product>
                    <property>aero/qbar-psf</property>
                    <property>metrics/Sw-sqft</property>
                    <property>fcs/speedbrake-pos-norm</property>
                    <value>0.0240</value>
                </product>
            </function>
            <function name="aero/coefficient/CDbeta">
                <description>Drag_due_to_sideslip</description>
                <product>
                    <property>aero/qbar-psf</property>
                    <property>metrics/Sw-sqft</property>
                      <table>
                          <independentVar>aero/beta-rad</independentVar>
                          <tableData>
                              -1.5700	1.2300
                              -0.2600	0.0500
                              0.0000	0.0000
                              0.2600	0.0500
                              1.5700	1.2300
                          </tableData>
                      </table>
                </product>
            </function>
            <function name="aero/coefficient/CDde">
                <description>Drag_due_to_Elevator_Deflection</description>
                <product>
                    <property>aero/qbar-psf</property>
                    <property>metrics/Sw-sqft</property>
                    <property>fcs/elevator-pos-norm</property>
                    <value>0.0750</value>
                </product>
            </function>
        </axis>

        <axis name="SIDE">
            <function name="aero/coefficient/CYb">
                <description>Side_force_due_to_beta</description>
                <product>
                    <property>aero/qbar-psf</property>
                    <property>metrics/Sw-sqft</property>
                    <property>aero/beta-rad</property>
                    <value>-1.0000</value>
                </product>
            </function>
        </axis>

        <axis name="LIFT">
            <function name="aero/coefficient/CLalpha">
                <description>Lift_due_to_alpha</description>
                <product>
                    <property>aero/qbar-psf</property>
                    <property>metrics/Sw-sqft</property>
                    <property>aero/function/kCLge</property>
                      <table>
                          <independentVar>aero/alpha-rad</independentVar>
                          <tableData>
                              -0.209    -0.7000
                                -0.1396 -0.390
                                0        0.1200
                                0.0349   0.2500
                                0.0698   0.4000
                                0.1396  0.7000
                                0.2443   1.100
                                0.279   1.0500
                                0.349     1.0200
                                0.6000	0.5820
                          </tableData>
                      </table>
                </product>
            </function>
            <function name="aero/coefficient/dCLflap">
                <description>Delta_Lift_due_to_flaps</description>
                <product>
                    <property>aero/qbar-psf</property>
                    <property>metrics/Sw-sqft</property>
                    <property>aero/function/kCLge</property>
                    <table>
                            <independentVar>fcs/flap-pos-deg</independentVar>
                            <tableData>
                                0.0000	0.0000
                                10.0000	0.3000
                                20.0000	0.5500
                                30.0000	0.8000
                                40.0000    0.9500
                                50.0000   1.1000
                          </tableData>
                      </table>
                    <value>0.3500</value>
                </product>
            </function>
            <function name="aero/coefficient/dCLsb">
                <description>Delta_Lift_due_to_speedbrake</description>
                <product>
                    <property>aero/qbar-psf</property>
                    <property>metrics/Sw-sqft</property>
                    <property>fcs/speedbrake-pos-norm</property>
                    <value>0.0000</value>
                </product>
            </function>
            <function name="aero/coefficient/CLde">
                <description>Lift_due_to_Elevator_Deflection</description>
                <product>
                    <property>aero/qbar-psf</property>
                    <property>metrics/Sw-sqft</property>
                    <property>fcs/elevator-pos-rad</property>
                    <value>0.2000</value>
                </product>
            </function>
        </axis>

        <axis name="ROLL">
            <function name="aero/coefficient/Clb">
                <description>Roll_moment_due_to_beta</description>
                <product>
                    <property>aero/qbar-psf</property>
                    <property>metrics/Sw-sqft</property>
                    <property>metrics/bw-ft</property>
                    <property>aero/beta-rad</property>
                    <value>-0.1000</value>
                </product>
            </function>
            <function name="aero/coefficient/Clp">
                <description>Roll_moment_due_to_roll_rate</description>
                <product>
                    <property>aero/qbar-psf</property>
                    <property>metrics/Sw-sqft</property>
                    <property>metrics/bw-ft</property>
                    <property>aero/bi2vel</property>
                    <property>velocities/p-aero-rad_sec</property>
                    <value>-0.4000</value>
                </product>
            </function>
            <function name="aero/coefficient/Clr">
                <description>Roll_moment_due_to_yaw_rate</description>
                <product>
                    <property>aero/qbar-psf</property>
                    <property>metrics/Sw-sqft</property>
                    <property>metrics/bw-ft</property>
                    <property>aero/bi2vel</property>
                    <property>velocities/r-aero-rad_sec</property>
                    <value>0.1500</value>
                </product>
            </function>
            <function name="aero/coefficient/Clda">
                <description>Roll_moment_due_to_aileron</description>
                <product>
                    <property>aero/qbar-psf</property>
                    <property>metrics/Sw-sqft</property>
                    <property>metrics/bw-ft</property>
                    <property>fcs/left-aileron-pos-rad</property>
                      <table>
                          <independentVar>velocities/mach</independentVar>
                          <tableData>
                              0.0000	0.1200
                              2.0000	0.0400
                          </tableData>
                      </table>
                </product>
            </function>
            <function name="aero/coefficient/Cldr">
                <description>Roll_moment_due_to_rudder</description>
                <product>
                    <property>aero/qbar-psf</property>
                    <property>metrics/Sw-sqft</property>
                    <property>metrics/bw-ft</property>
                    <property>fcs/rudder-pos-rad</property>
                    <value>0.0100</value>
                </product>
            </function>
        </axis>

        <axis name="PITCH">
            <function name="aero/coefficient/Cmalpha">
                <description>Pitch_moment_due_to_alpha</description>
                <product>
                    <property>aero/qbar-psf</property>
                    <property>metrics/Sw-sqft</property>
                    <property>metrics/cbarw-ft</property>
                    <property>aero/alpha-rad</property>
                    <value>-0.3000</value>
                </product>
            </function>
            <function name="aero/coefficient/Cmde">
                <description>Pitch_moment_due_to_elevator</description>
                <product>
                    <property>aero/qbar-psf</property>
                    <property>metrics/Sw-sqft</property>
                    <property>metrics/cbarw-ft</property>
                    <property>fcs/elevator-pos-rad</property>
                      <table>
                          <independentVar>velocities/mach</independentVar>
                          <tableData>
                              0.0000	-0.8000
                              2.0000	-0.2000
                          </tableData>
                      </table>
                </product>
            </function>
            <function name="aero/coefficient/Cmq">
                <description>Pitch_moment_due_to_pitch_rate</description>
                <product>
                    <property>aero/qbar-psf</property>
                    <property>metrics/Sw-sqft</property>
                    <property>metrics/cbarw-ft</property>
                    <property>aero/ci2vel</property>
                    <property>velocities/q-aero-rad_sec</property>
                    <value>-18.0000</value>
                </product>
            </function>
            <function name="aero/coefficient/Cmadot">
                <description>Pitch_moment_due_to_alpha_rate</description>
                <product>
                    <property>aero/qbar-psf</property>
                    <property>metrics/Sw-sqft</property>
                    <property>metrics/cbarw-ft</property>
                    <property>aero/ci2vel</property>
                    <property>aero/alphadot-rad_sec</property>
                    <value>-9.0000</value>
                </product>
            </function>
        </axis>

        <axis name="YAW">
            <function name="aero/coefficient/Cnb">
                <description>Yaw_moment_due_to_beta</description>
                <product>
                    <property>aero/qbar-psf</property>
                    <property>metrics/Sw-sqft</property>
                    <property>metrics/bw-ft</property>
                    <property>aero/beta-rad</property>
                    <value>0.1200</value>
                </product>
            </function>
            <function name="aero/coefficient/Cnr">
                <description>Yaw_moment_due_to_yaw_rate</description>
                <product>
                    <property>aero/qbar-psf</property>
                    <property>metrics/Sw-sqft</property>
                    <property>metrics/bw-ft</property>
                    <property>aero/bi2vel</property>
                    <property>velocities/r-aero-rad_sec</property>
                    <value>-0.1500</value>
                </product>
            </function>
            <function name="aero/coefficient/Cndr">
                <description>Yaw_moment_due_to_rudder</description>
                <product>
                    <property>aero/qbar-psf</property>
                    <property>metrics/Sw-sqft</property>
                    <property>metrics/bw-ft</property>
                    <property>fcs/rudder-pos-rad</property>
                    <value>-0.1000</value>
                </product>
            </function>
            <function name="aero/coefficient/Cnda">
                <description>Adverse_yaw</description>
                <product>
                    <property>aero/qbar-psf</property>
                    <property>metrics/Sw-sqft</property>
                    <property>metrics/bw-ft</property>
                    <property>fcs/left-aileron-pos-rad</property>
                    <value>0.0000</value>
                </product>
            </function>
        </axis>
    </aerodynamics>
</fdm_config>
